# ============================================================
# LAMMPS Production Script V2 — Active Glass (80k particles)
# Dataset: Secondary / Temporal Generalization Test
#
# Key differences from V1:
#   - Active force increased by 25%: a_force = 1.25 (was 1.0)
#   - All random seeds replaced:
#       Langevin thermostat : 812743  (was 234567)
#   - Output format strictly identical to V1
# ============================================================

units		lj
dimension	2
atom_style      hybrid dipole sphere
boundary	p p p

# --- Physical Parameters (V2 modifications) ---
variable damp    index 1.0
variable a_force index 1.25
variable dumpfile index trajectory_80k_v2.dump
variable output   index final_80k_v2.data

# WCA potential (purely repulsive)
pair_style lj/cut 2.5
pair_modify shift yes

read_data	input.file

# Zero all velocities and Z-coordinates for clean 2D start
velocity        all set 0.0 0.0 0.0 units box
set             group all z 0.0
set             group all mass 1.0
set             group all diameter 1.0

neighbor        1.0 bin
neigh_modify    delay 0 every 1 check yes
comm_modify     mode single cutoff 5.0

reset_timestep  0
timestep	0.001

pair_coeff * * 1.0 1.0 1.1224

# --- Computes ---
compute         myTemp   all temp
compute         Tempx    all temp/partial 1 0 0
compute         Tempy    all temp/partial 0 1 0
compute         myVirial all pressure myTemp virial
compute         lstress  all stress/atom NULL virial
compute         peratom  all pe/atom
compute         1        all pe/atom
compute         pe       all reduce sum c_peratom
compute         ord      all hexorder/atom
compute         voronoi  all voronoi/atom
compute         msd      all msd com yes

variable        sxx equal -c_myVirial[1]
variable        syy equal -c_myVirial[2]
variable        sxy equal -c_myVirial[4]

fix             twod all enforce2d
fix             f5   all ave/atom 1 1 1 c_ord[1] c_ord[2]

group A type 1
group B type 2

compute ke1 A ke
compute ke2 B ke

########## Inherent Structure Minimization at T=0 ###########
velocity        all set 0.0 0.0 0.0 units box
fix             twod all enforce2d
min_style       cg
minimize        1.0e-12 1.0e-12 1000000 1000000
#############################################################

# --- Dynamics: NVE sphere + Langevin (T=0, new seed) + Active propulsion ---
fix             2      all nve/sphere disc
fix             1      all langevin 0.0 0.0 ${damp} 812743
fix             active all propel/self dipole ${a_force}
fix             twod   all enforce2d

# --- 50,000-step equilibration (silent) ---
run   50000

# --- Output setup (identical format to V1) ---
dump            id all custom 1 ${dumpfile} id type x y mux muy c_voronoi[1] c_ord[1] c_ord[2]
dump_modify     id sort 1 every 10000

# --- Checkpoint every 50,000 steps ---
restart         50000 restart_v2.checkpoint

# --- Thermo for production monitoring ---
thermo          1000
thermo_style    custom step temp etotal pe ke c_ke1 c_ke2 press vol c_msd[1] c_msd[2] c_msd[4]
run_style       verlet

# --- Production run: 500,000 steps ---
run             500000
write_data      ${output}
